*Heading
** Job name: bb Model name: Beam2D
** Generated by: Abaqus/CAE 2022
*Preprint, echo=NO, model=NO, history=NO, contact=NO
**
** PARTS
**
*Part, name=PART-1
*Node
      1,           0.,           0.,           0.
      2, 0.00999999978,           0.,           0.
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*Element, type=S4R
  1,   1,   2, 103, 102
  2,   2,   3, 104, 103
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*Nset, nset=SET-1, generate
   1,  404,    1
*Elset, elset=SET-1, generate
   1,  300,    1
** Section: Section-1-SET-1
*Shell General Section, elset=SET-1, material=MATERIAL-1
0.01,
*End Part
**
**
** ASSEMBLY
**
*Assembly, name=Assembly
**
*Instance, name=PART-1-1, part=PART-1
*End Instance
**
*Nset, nset=SET-1, instance=PART-1-1
   1, 101, 102, 202, 203, 303, 304, 404
*Elset, elset=SET-1, instance=PART-1-1
   1, 100, 101, 200, 201, 300
*Nset, nset=Set-2, instance=PART-1-1, generate
   1,  304,  101
*Nset, nset=Set-3, instance=PART-1-1, generate
   1,  304,  101
*End Assembly
**
** MATERIALS
**
*Material, name=MATERIAL-1
*Density
4400.,
*Elastic
 1.04e+11, 0.3
**
** BOUNDARY CONDITIONS
**
** Name: BC-1 Type: Displacement/Rotation
*Boundary
Set-3, 1, 1
Set-3, 2, 2
Set-3, 3, 3
Set-3, 4, 4
Set-3, 5, 5
Set-3, 6, 6
** ----------------------------------------------------------------
